// SBML level 3 version 1

model main()

  // Compartments:
  compartment sub1__C = 1;

  // Species:
  substanceOnly species sub1__s1 in sub1__C = 1;

  // Parameters:
  timeconv = 60;
  extentconv = 1000;
  t1 = 1;
  t2 = time/timeconv + 3;
  t4 = 1;
  t5 = 1;

  // Assignment rules:
  t3 := delay(t1, 3*timeconv);

  // Rate rules:
  t1' = (time/timeconv*t1 + 3)/timeconv;

  // Algebraic rules:
  0 = t4 - delay(t3, time/timeconv*timeconv);

  // Reactions:
  sub1__J0: -> sub1__s1; sub1__s1*t3*(time/timeconv)/delay(t5, 2e4*timeconv)*(extentconv/timeconv);

  // Events:
  at (1/(time/timeconv)*timeconv) after (time/timeconv > 3): t5 = time/timeconv;

  // Constraints:
  constraint time/timeconv < t4*t5;
end
