// SBML level 3 version 1

model main()

  // Compartments:
  compartment sub1__sub1__sub1__C = 1;

  // Species:
  substanceOnly species sub1__sub1__sub1__s1 in sub1__sub1__sub1__C = 1;

  // Parameters:
  timeconv_times_sub1__timeconv_times_sub1__sub1__timeconv = timeconv*sub1__timeconv*sub1__sub1__timeconv;
  extentconv_times_sub1__extentconv_times_sub1__sub1__extentconv = extentconv*sub1__extentconv*sub1__sub1__extentconv;
  timeconv_times_sub1__timeconv = timeconv*sub1__timeconv;
  extentconv_times_sub1__extentconv = extentconv*sub1__extentconv;
  sub1__sub1__timeconv = 60;
  sub1__sub1__extentconv = 10;
  sub1__timeconv = 60;
  sub1__extentconv = 10;
  timeconv = 60;
  extentconv = 10;

  // Reactions:
  sub1__sub1__sub1__J0: -> sub1__sub1__sub1__s1; sub1__sub1__sub1__s1*(time/timeconv_times_sub1__timeconv_times_sub1__sub1__timeconv)/delay(sub1__sub1__sub1__s1, 2e4*timeconv_times_sub1__timeconv_times_sub1__sub1__timeconv)*(extentconv_times_sub1__extentconv_times_sub1__sub1__extentconv/timeconv_times_sub1__timeconv_times_sub1__sub1__timeconv);
end
