// SBML level 3 version 1

model enzyme(S1_stoich)
  // model units - time: second, extent: mole

  // Compartments:
  compartment c = 1 litre;

  // Species:
  substanceOnly species S1 in c = 1;  // substance in mole

  // Reactions:
  R1: S1_stoich S1 => ; S1/k;
    k = 0.1 second;
end

model aggregate()
  // model units - time: second, extent: mole

  // Sub-modules:
  submod1: enzyme();

  // Compartments:
  compartment c = 1 litre;

  // Species:
  substanceOnly species S in c = 1;  // substance in mole
  substanceOnly species S1 in c = 1;  // substance in mole

  // Initial assignments:
  S1_stoich = 3/2;

  // Reactions:
  R1: S1_stoich S1 => S; S/k;
    k = 0.1 second;
end
