// SBML level 3 version 1

model enzyme(S1_stoich)
  // model units - time: second, extent: mole

  // Compartments:
  compartment c = 1 millilitre;

  // Species:
  substanceOnly species S1 in c = 1;  // substance in mole

  // Reactions:
  R1: S1_stoich S1 => ; S1/k;
    k = 0.1 millimetre;

  // Unit definitions:
  unit millimetre = 1e-3 metre;
  unit milligram = 1e-3 gram;
  unit millilitre = 1e-3 litre;
end

model aggregate()
  // model units - time: second, extent: mole

  // Sub-modules:
  submod1: enzyme();

  // Compartments:
  compartment c = 1 litre;

  // Species:
  substanceOnly species S in c = 1;  // substance in ounce
  substanceOnly species S1 in c = 1;  // substance in ounce

  // Initial assignments:
  S1_stoich = 3/2;

  // Reactions:
  R1: S1_stoich S1 => S; S/k;
    k = 0.1 second;

  // Unit definitions:
  unit foot = 0.3048 metre; submod1.millimetre is foot;
  unit ounce = 28.34952 gram; submod1.milligram is ounce;
  unit gallon = 3.78541 litre; submod1.millilitre is gallon;
end
