// SBML level 3 version 1

model aggregate()
  // model units - time: second, extent: mole

  // Compartments:
  compartment submod1__c = 1 gallon;
  compartment c = 1 litre;

  // Species:
  substanceOnly species submod1__S1 in submod1__c = 1;  // substance in mole
  substanceOnly species S in c = 1;  // substance in submod1__milligram
  substanceOnly species S1 in c = 1;  // substance in submod1__milligram

  // Initial assignments:
  S1_stoich = 3/2;

  // Reactions:
  submod1__R1: submod1__S1_stoich submod1__S1 => ; submod1__S1/submod1__k;
    submod1__k = 0.1 foot;
  R1: S1_stoich submod1__S1 => S; S/k;
    k = 0.1 second;

  // Unit definitions:
  unit submod1__milligram = 1e-3 gram;
  unit foot = 0.3048 metre;
  unit gallon = 3.78541 litre;
end
